// COMSOL Multiphysics 6.3.0.290 model "teste-comsol-gap-3.mph"
// Outline of the model tree

Parameters
  corrente = 46.67 [mA]
  N = 240

Geometry
  geom1 "Geometry 1" (2D, length unit m)
    r1: Rectangle | size = {8.5/100, 5.6/100}; pos = {-4.25/100, -2.8/100}
    r2: Rectangle | size = {1.4/100, 2.8/100}; pos = {-2.8/100, -1.3/100}
    r3: Rectangle | size = {1.4/100, 2.8/100}; pos = {1.4/100, -1.3/100}
    r7: Rectangle | base = center
    r5: Rectangle | size = {1.27/100, 1.9/100}; base = center; pos = {-0.021, 0}
    r6: Rectangle | size = {1.27/100, 1.9/100}; base = center; pos = {0.021, 0}
    r8: Rectangle | size = {5.6/100, 0.2/100}; pos = {-2.8/100, -1.5/100}
    del1: Delete "Delete Entities 1" | input = r2(1) boundaries 1
    del2: Delete "Delete Entities 2" | input = r8(1) boundaries 3
    del3: Delete "Delete Entities 3" | input = r3(1) boundaries 1
    pol2: Polygon | source = table; table = {{-0.014, -0.013}, {0.014, -0.013}}
    fin: Finalize "Form Union"

Materials
  mat1: Common "Air" on domains 1, 3
    def: def "Basic"
      thermalexpansioncoefficient = alpha_p(pA,T)
      molarmass = 0.02897[kg/mol]
      bulkviscosity = muB(T)
      relpermeability = 1
      relpermittivity = 1
      dynamicviscosity = eta(T)
      ratioofspecificheat = 1.4
      electricconductivity = 0[S/m]
      heatcapacity = Cp(T)
      density = rho(pA,T)
      thermalconductivity = k(T)
      soundspeed = cs(T)
      eta: Piecewise | arg = T; pieces = {200.0, 1600.0, -8.38278E-7+8.35717342E-8*T^1-7.69429583E-11*T^2+4.6437266E-14*T^3-1.06585607E-17*T^4}; argunit = K; fununit = Pa*s
      Cp: Piecewise | arg = T; pieces = {200.0, 1600.0, 1047.63657-0.372589265*T^1+9.45304214E-4*T^2-6.02409443E-7*T^3+1.2858961E-10*T^4}; argunit = K; fununit = J/(kg*K)
      rho: Analytic | expr = pA*0.02897/R_const[K*mol/J]/T; args = {pA, T}; fununit = kg/m^3; argunit = {Pa, K}
      k: Piecewise | arg = T; pieces = {200.0, 1600.0, -0.00227583562+1.15480022E-4*T^1-7.90252856E-8*T^2+4.11702505E-11*T^3-7.43864331E-15*T^4}; argunit = K; fununit = W/(m*K)
      cs: Analytic | expr = sqrt(1.4*R_const[K*mol/J]/0.02897*T); args = T; fununit = m/s; argunit = K
      an1: Analytic | funcname = alpha_p; expr = -1/rho(pA,T)*d(rho(pA,T),T); args = {pA, T}; fununit = 1/K; argunit = {Pa, K}
      an2: Analytic "Analytic 2a" | funcname = muB; expr = 0.6*eta(T); args = T; fununit = Pa*s; argunit = K
    RefractiveIndex: RefractiveIndex
      n = 1
      ki = 0
    NonlinearModel: NonlinearModel
      BA = def.gamma-1
    idealGas: idealGas
      Rs = R_const/Mn
      heatcapacity = Cp(T)
      ratioofspecificheat = 1.4
      molarmass = 0.02897[kg/mol]
      Cp: Piecewise | arg = T; pieces = {200.0, 1600.0, 1047.63657-0.372589265*T^1+9.45304214E-4*T^2-6.02409443E-7*T^3+1.2858961E-10*T^4}; argunit = K; fununit = J/(kg*K)
  mat2: Common "Copper" on domains 4, 5
    def: def "Basic"
      relpermeability = 1
      electricconductivity = 5.998e7[S/m]
      thermalexpansioncoefficient = 17e-6[1/K]
      heatcapacity = 385[J/(kg*K)]
      relpermittivity = 1
      density = 8960[kg/m^3]
      thermalconductivity = 400[W/(m*K)]
    Enu: Enu "Young's modulus and Poisson's ratio"
      E = 110[GPa]
      nu = 0.35
    linzRes: linzRes "Linearized resistivity"
      rho0 = 1.72e-8[ohm*m]
      alpha = 0.0039[1/K]
      Tref = 298[K]
  mat3: Common "Silicon Steel NGO M-36" (disabled) on domains 2
    def: def "Basic"
      electricconductivity = 2.325581[MS/m]
      relpermittivity = 1[1]
    BHCurve: BHCurve
      normB = BH(normHin)
      normH = BH_inv(normBin)
      Wpm = BH_prim(normHin)
      normHin = sqrt(H1^2+H2^2+H3^2+eps)
      DESCR_PREFIX:normHin = Magnetic field norm
      normBin = sqrt(B1^2+B2^2+B3^2+eps)
      DESCR_PREFIX:normBin = Magnetic flux density norm
      BH: Interpolation
        funcnametable = {BHCurve1, 1}
        table = 
          {0, 0}
          {18.9586666666667, 0.04}
          {37.6693333333333, 0.08}
          {55.884, 0.12}
          {73.3546666666667, 0.16}
          {89.8333333333333, 0.2}
          {105.281333333333, 0.24024}
          {120.497333333333, 0.28192}
          {136.489333333333, 0.32648}
          {154.265333333333, 0.37536}
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        extrap = linear
        fununit = T
        argunit = A/m
        defineinv = on
        defineprimfun = on
  mat4: Common "Silicon Steel NGO 50PN470" on domains 2
    def: def "Basic"
      electricconductivity = 2.631578[MS/m]
      relpermittivity = 1[1]
    BHCurve: BHCurve
      normB = BH(normHin)
      normH = BH_inv(normBin)
      Wpm = BH_prim(normHin)
      normHin = sqrt(H1^2+H2^2+H3^2+eps)
      DESCR_PREFIX:normHin = Magnetic field norm
      normBin = sqrt(B1^2+B2^2+B3^2+eps)
      DESCR_PREFIX:normBin = Magnetic flux density norm
      BH: Interpolation
        funcnametable = {BHCurve1, 1}
        table = 
          {0, 0}
          {20, 0.064356436}
          {22.5, 0.0879099632422}
          {25, 0.1116955449375}
          {27.5, 0.135945235539}
          {30, 0.1608910895}
          {32.5, 0.186765161273}
          {35, 0.2137995053125}
          {37.5, 0.24222617607}
          {40, 0.272277228}
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        extrap = linear
        fununit = T
        argunit = A/m
        defineinv = on
        defineprimfun = on

Physics
  mf: InductionCurrents "Magnetic Fields" on all domains
    dependent variable A = {Ax, Ay, Az}
    d.d = 2.8/100
    fsp1: FreeSpace (default)
    mi1: MagneticInsulation (default)
    init1: init "Initial Values 1" (default)
    als1: AmperesLawSolid "Ampère's Law in Solids 1" on domains 2 | ConstitutiveRelationBH = BHCurve
    coil1: Coil on domains 4, 5 | ConductorModel = Multi; coilGroup = 1; ICoil = corrente; N = N; materialType = from_mat
      rcd1: ReverseCoilGroupDomain "Reversed Current Direction 1" on domains 4

Mesh
  mesh1 "Mesh 1" (physics-controlled)

Studies
  std1 "Study 1"
    stat: Stationary
    time: Transient "Time Dependent" (disabled) | tlist = range(0,0.1,1)

Solver configurations
  sol1 "Solution 1" (study std1)
    v1: Variables "Dependent Variables 1"
    s1: Stationary "Stationary Solver 1"
      dDef: Direct
      fc1: FullyCoupled

Datasets
  dset1: Solution | solution = sol1

Derived values
  gev1: EvalGlobal "Global Evaluation 1"
    data = dset1
    table = tbl1
    expr = {mf.LCoil_1, (N^2)/(mf.LCoil_1), (corrente*N)/((N^2)/(mf.LCoil_1))}
    unit = {H, s^2*A^2/(kg*m^2), Wb}
    descr = {Indutância, Relutância Equivalente, Fluxo Magnético}

Tables
  tbl1: Table
    // Global Evaluation 1
    Indutância (H) | Relutância Equivalente (s^2*A^2/(kg*m^2)) | Fluxo Magnético (Wb)
    0.0346851 | 1.66066e+06 | 6.74481e-06

Plots
  pg1: PlotGroup2D "2D Plot Group 1"
  pg2: PlotGroup2D "Magnetic Flux Density (mf)" | data = dset1
    surf1: Surface | expr = mf.normB
    str1: Streamline on boundaries 4-7, 9-15, 17-25 | expr = {mf.Bx, mf.By}; udist = 0.03; maxsteps = 5000
      col1: Color "Color Expression 1" | expr = mf.normB
      filt1: Filter | expr = !isScalingSystemDomain
    con1: Contour | expr = mf.Az; levelrounding = off
      filt1: Filter | expr = !isScalingSystemDomain